*HEADING
**pyCM input deck, converted from VTK format
**C:/git/pyCM/data/Nik_left.abq.inp
*NODE
1,0.971000,4.815500,1.000000
2,2.729121,4.566652,1.000000
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*ELEMENT, TYPE=C3D8
1,1,2,3,4,5,6,7,8
2,9,2,1,10,11,6,5,12
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*ELSET, ELSET=DOMAIN, GENERATE
1,34500,1
*ELSET, ELSET=BC
4884,4881,4873,3791,4886,3790
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*SOLID SECTION, ELSET=DOMAIN, MATERIAL=USERSPEC
*MATERIAL, NAME=USERSPEC
*ELASTIC, TYPE=ISO
 200000,0.300
*STEP, NAME=CONFORM
*STATIC
*BOUNDARY
6393, 1,2, 0
15, 2, 0
*BOUNDARY
1753, 3,, 0.063592
1767, 3,, 0.063065
1770, 3,, 0.063065
6401, 3,, 0.063399
1756, 3,, 0.063970
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16, 3,, 0.129227
*EL FILE
S,E
*EL PRINT
COORD,S
*ENDSTEP
